# Скорость на выходе из компрессора
c_k =  # error: Эта переменная не определена.
0.51*c_3 =  # error  # м/с
# Степень торможения скорости в выходной системе примем c_в.с := 1
# Скорость на выходе из ЛД
ξ_лд0 := (4*k_f*tan(θ_э/2)^1.25*(1 - 1/F'_ЛД)^1.92 + 0.015/(8*sin(θ_э/2))*(1 - 1/F'_ЛД^2))
c_4 := c_k/c_в.с explicit, ALL → .51*c_3/1  # м/с
# Cтепень торможения в ЛД | степенью уширения лопаточного диффузора
c_4/c_3 explicit, ALL → =  # error
F'_ЛД := c_3/c_4
# Приведенная скорость на выходе из ЛД
λ_4 := c_4/α_кр3 explicit, ALL →
# Статическая температура на выходе из ЛД
T_4 := T_3 + (c_3^2 - c_4^2)/(2*c_p) explicit, λ_4, T*_3 →  # К
# РАСЧЕТ ЛД
# Зададим угол раскрытия эквивалентного диффузора | Коэффициент k_f := 1
θ_э := 10*deg
k_f2 := .66 + .111*θ_э
k_f3 := 1.3 + 0.03*θ_э
# Коэффициент потерь в лопаточном диффузоре
ξ_лд0 := (4*k_f*tan(θ_э/2)^1.25*(1 - 1/F'_ЛД)^1.92)
ξ_лд0 explicit, ALL → =  # error
ξ_лд := ξ_лд0 if λ_3 < 0.8
(ξ_лд0*(1 + 4.2*(λ_3 - 0.8)^2)) otherwise explicit, ALL →
# Потери в ЛД и показатель политропы
ΔH_ЛД := 0.5*ξ_лд*c_3^2 explicit, ALL →  # Дж/кг
А_ЛД := (k/(k - 1) - ΔH_ЛД/(R*(T_4 - T_3))) explicit, ALL →
n_ЛД := А_ЛД/(А_ЛД - 1) explicit, ALL →
# Статические и полные параметры потока за ЛД
кг/м^3
ρ_4 := ρ_3*(T_4/T_3)^(А_ЛД - 1) explicit, ALL →
p_4 := p_3*(T_4/T_3)^А_ЛД explicit, ALL →  # Па
p*_4 := p_4/π(λ_4) explicit, p_4, λ_4 →  # Па
ρ*_4 := ρ_4/ε(λ_4) explicit, ρ_4, λ_4 →  # кг/м^3
# Коэффициент сохранения полного давления
σ_ЛД := p*_4/p*_3 explicit, ALL →
η*_п.лд := 1 - (ΔH_рк + ΔH_рк + ΔH_f + ΔH_ЛД)/H_k explicit, ALL →
K_G4 := sqrt(η*_п.лд)*τ(λ_4)/τ(λ_4*sqrt(η*_п.лд)) explicit, ALL →
# Уточненное значение коэффициента уширения
F'_ЛД1 := ρ_3*c_3*K_G3/(ρ_4*c_4*K_G4) explicit, ALL →
F'_ЛД =  # error
(F'_ЛД - F'_ЛД1)/F'_ЛД =  # error
c_k ≡ .51*c_3
l_cp := R_л*(α_л4 - α_л3) explicit, ALL → R_л*(α_л4 - α_л3)
c_3/sqrt(k*R*T_3) =  # error
z_лд := π*(D_4*sin(α_л4) - D_3*sin(α_л3))/(2*l_cp*tan(θ_э/2))
